/TITLE, FINE GRID CANTILEVER 12x8
/PREP7
! Define element type: ET, type #, name
ET,1,PLANE42
! Define material property: MP, property, card #, value
MP,EX,1,  1.00000000
MP,PRXY,1, 0.300000000
MP,DENS,1,  1.00000000
! Define nodal coordinate: N, node #, x-coord, y-coord, z-coord
N,    1, 0.00000000, 0.00000000, 0.
N,    2, 0.00000000, 0.50000000, 0.
N,    3, 0.00000000, 1.00000000, 0.
N,    4, 0.00000000, 1.50000000, 0.
N,    5, 0.00000000, 2.00000000, 0.
N,    6, 0.00000000, 2.50000000, 0.
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N,  117, 6.00000000, 4.00000000, 0.
! Define element connectivity: EN, element #, nodal list
EN,    1,    1,   10,   11,    2
EN,    2,    2,   11,   12,    3
EN,    3,    3,   12,   13,    4
EN,    4,    4,   13,   14,    5
EN,    5,    5,   14,   15,    6
EN,    6,    6,   15,   16,    7
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EN,   96,  107,  116,  117,  108
! Define boundary support conditions: D, node #, dof label, value
D,    1, UX, 0.000000000
D,    1, UY, 0.000000000
D,    2, UX, 0.000000000
D,    2, UY, 0.000000000
D,    3, UX, 0.000000000
D,    3, UY, 0.000000000
D,    4, UX, 0.000000000
D,    4, UY, 0.000000000
D,    5, UX, 0.000000000
D,    5, UY, 0.000000000
D,    6, UX, 0.000000000
D,    6, UY, 0.000000000
D,    7, UX, 0.000000000
D,    7, UY, 0.000000000
D,    8, UX, 0.000000000
D,    8, UY, 0.000000000
D,    9, UX, 0.000000000
D,    9, UY, 0.000000000
! Define nodal load conditions: F, node #, dof label, value
!F,  109, FX, 0.001250000
!F,  110, FX, 0.002500000
!F,  111, FX, 0.002500000
!F,  112, FX, 0.002500000
!F,  113, FX, 0.002500000
!F,  114, FX, 0.002500000
!F,  115, FX, 0.002500000
!F,  116, FX, 0.002500000
!F,  117, FX, 0.001250000
! Define surface load conditions: SFE, element #, face #, PRES, 0, value
SFE,   89, 2, PRES, 0, -0.01
SFE,   90, 2, PRES, 0, -0.01
SFE,   91, 2, PRES, 0, -0.01
SFE,   92, 2, PRES, 0, -0.01
SFE,   93, 2, PRES, 0, -0.01
SFE,   94, 2, PRES, 0, -0.01
SFE,   95, 2, PRES, 0, -0.01
SFE,   96, 2, PRES, 0, -0.01
FINISH
